ORIGIN := 1
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Провода_спр := READEXCEL("ПРОВОДА.xlsx")
Трансформатор_спр := READEXCEL("ТРАНСФОРМАТОРЫ.xlsx")
ИД := READEXCEL("ИСХОДНЫЕ ДАННЫЕ.xlsx")
Трансформаторы :=
    Трансформаторы ← submatrix(ИД, 2, rows(ИД), 6, 8)
    i ← 1
    while Трансформаторы[i, 1] > 0
        i ← i + 1
    Трансформаторы ← submatrix(ИД, 2, i, 6, 8)
n_л.н := 0.4
n'_л.н := 0
Линии :=
    Линии ← submatrix(ИД, 2, rows(ИД), 1, 4)
    i ← 1
    while Линии[i, 1] > 0
        i ← i + 1
    Линии ← submatrix(ИД, 2, i, 1, 4)
n_л.л := 0.1
n'_л.л := 0.1
n_н.п := 0.2
n'_н.п := 0
n_т := 0.1
n'_т := 0.4
Линии = [
    1, 2, "ААБ-185", 2.4;
    2, 5, "АСБ-150", 0.045;
    5, 8, "АСБ-95", 0.24;
    5, 20, "ААБ-150", 0.32;
    8, 11, "ААБ-185", 0.27;
    11, 14, "ААБ-185", 0.3;
    14, 17, "АСБ-150", 1.3;
    20, 22, "ААШВ-95", 0.28;
    22, 25, "АСБ-95", 0.38;
    22, 28, "ААШВ-95", 0.35
]
n_а.д := 0.2
n'_а.д := 0.5
U_ном := 10
k_1 := 0.6
cosφ := 0.93
m := 0.15
n := 1.2
δU_ст := 1.78
ΔU''_нн.б := 0
ΔU''_нн.у := 5
L_Σ :=
    for i ∈ 1 .. rows(Линии)
        a ← a + Линии[i, 4]
S_Σ :=
    for i ∈ 1 .. rows(Трансформаторы)
        a ← a + Трансформаторы[i, 3]
Таблица_1.1 := stack(["n.л.н", "n.л.л", "n.н.п", "n.т", "n.а.д", "n'.л.н", "n'.л.л", "n'.н.п", "n'.т", "n'.а.д"], [n_л.н, n_л.л, n_н.п, n_т, n_а.д, n'_л.н, n'_л.л, n'_н.п, n'_т, n'_а.д])
Таблица_1.2 := stack(["U.ном", "k.1", "cosφ", "m", "n", "δU.ст", "ΔU''.нн.б", "ΔU''.нн.у"], [U_ном, k_1, cosφ, m, n, δU_ст, ΔU''_нн.б, ΔU''_нн.у])
Таблица_1.3 := stack(["Начало", "Конец", "Марка провода", "Длина"], Линии)
Таблица_1.4 := stack(["Начало", "Конец", "Мощность"], Трансформаторы)
a := WRITEEXCEL(Таблица_1.1, "Таблица 1.1.xlsx")
a := WRITEEXCEL(Таблица_1.2, "Таблица 1.2.xlsx")
а := WRITEEXCEL(Таблица_1.3, "Таблица 1.3.xlsx")
а := WRITEEXCEL(Таблица_1.4, "Таблица 1.4.xlsx")
# 1. Cхема распределительной сети и её краткая характеристика
L_Σ = 5.885
S_Σ = 6920
# 2. Расчёт параметров трансформаторов ТП и участков распределительной сети (активного и реактивного сопротивлений, токов, активных и реактивных мощностей каждой ТП)
z_0 :=
    for i ∈ 1 .. rows(Линии)
        for j ∈ 1 .. rows(Провода_спр)
            if Линии[i, 3] == Провода_спр[j, 1]
                Z[i, 1] ← Провода_спр[j, 2]
                Z[i, 2] ← Провода_спр[j, 3]
                break
    Z
r_0 := z_0[:, 1]
x_0 := z_0[:, 2]
l := Линии[:, 4]
R := diag(r_0)*l
X := diag(x_0)*l
S_Σ := S_Σ
I_цп.нб := k_1*S_Σ/(sqrt(3)*U_ном) = 239.716
I_нб := I_цп.нб*Трансформаторы[:, 3]/S_Σ
I_нм := I_нб*m
sinφ := sqrt(1 - cosφ^2)
P_нб := sqrt(3)*I_нб*U_ном*cosφ
Q_нб := sqrt(3)*I_нб*U_ном*sinφ
P_нм := P_нб*m
Q_нм := Q_нб*m
Таблица_2.1 := stack(["Начало", "Конец", "l", "r.0", "x.0", "R", "X"], augment(Линии[:, 1], Линии[:, 2], l, r_0, x_0, R, X))
a := WRITEEXCEL(Таблица_2.1, "Таблица 2.1.xlsx")
Таблица_2.2 := stack(["Узел", "S.ном", "I.i.нб", "I.i.нм", "P.i.нб", "Q.i.нб", "P.i.нм", "Q.i.нм"], augment(Трансформаторы[:, 2], Трансформаторы[:, 3], I_нб, I_нм, P_нб, Q_нб, P_нм, Q_нм))
a := WRITEEXCEL(Таблица_2.2, "Таблица 2.2.xlsx")
a := 0
I_цп.нб*m = 35.9574
I_цп.нб = 239.716
# 3. Cоставление функций статических характеристик активной и реактивной мощности по каждой ТП
P/P_ном.л.н(δU) := n_л.н*(1 + 1.5*δU) → 0.6*δU + 0.4
Q/Q_ном.л.н(δU) := 0
P/P_ном.л.л(δU) := n_л.л*(1 + 1.5*δU) → 0.15*δU + 0.1
Q/Q_ном.л.л(δU) := n'_л.л*(1 + 3*δU + 2.2*δU^2) → 0.3*δU + 0.22*δU^2 + 0.1
P/P_ном.н.п(δU) := n_н.п*(1 + 2*δU + δU^2) → 0.4*δU + 0.2*δU^2 + 0.2
Q/Q_ном.н.п(δU) := 0
P/P_ном.т(δU) := n_т*(1 + 2*δU) → 0.2*δU + 0.1
Q/Q_ном.т(δU) := n'_т*(1 + 3.8*δU) → 1.52*δU + 0.4
P/P_ном.а.д(δU) := n_а.д*(1 + 0.12*(-0.75*δU + 4.75*δU^2 - 2.51*δU^3)) → -0.018*δU + 0.114*δU^2 + (-0.06*δU^3) + 0.2
Q/Q_ном.а.д(δU) := n'_а.д*(1 + 6*δU) → 3*δU + 0.5
P/P_ном(δU) := P/P_ном.л.н(δU) + P/P_ном.л.л(δU) + P/P_ном.н.п(δU) + P/P_ном.т(δU) + P/P_ном.а.д(δU) → 1.332*δU + 0.314*δU^2 + (-0.06*δU^3) + 1
Q/Q_ном(δU) := Q/Q_ном.л.н(δU) + Q/Q_ном.л.л(δU) + Q/Q_ном.н.п(δU) + Q/Q_ном.т(δU) + Q/Q_ном.а.д(δU) → 4.82*δU + 0.22*δU^2 + 1
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# 4. Определение зоны нечувствительности автоматического регуляторого напряжения в центре питания (ЦП)
δU_нч := n*δU_ст/2 explicit, ALL → 1.2*1.78/2 = 1.068
# 5. Расчёт режимов распределительной сети
kol_lin := rows(Линии) = 10
kol_tr := rows(Трансформаторы) = 19
n := stack(Трансформаторы[:, 1], Линии[:, 1])
k := stack(Трансформаторы[:, 2], Линии[:, 2])
b :=
    for i ∈ 1 .. kol_tr + kol_lin
        b[i] ← 1 if n[i] == 1
        b[i] ← 0 otherwise
    a ← 1
    f ← 1
    while f ≠ kol_lin + kol_tr
        for i ∈ 1 .. kol_lin + kol_tr
            if b[i] == a
                for j ∈ 1 .. kol_lin + kol_tr
                    if k[i] == n[j]
                        b[j] ← a + 1
                        f ← f + 1
        a ← a + 1
    b
augment(n, k, b) = [
    2, 3, 2;
    2, 4, 2;
    5, 6, 3;
    5, 7, 3;
    8, 9, 4;
    8, 10, 4;
    11, 12, 5;
    11, 13, 5;
    14, 15, 6;
    14, 16, 6;
    17, 18, 7;
    17, 19, 7;
    20, 21, 4;
    22, 23, 5;
    22, 24, 5;
    25, 26, 6;
    25, 27, 6;
    28, 29, 6;
    28, 30, 6;
    1, 2, 1;
    2, 5, 2;
    5, 8, 3;
    5, 20, 3;
    8, 11, 4;
    11, 14, 5;
    14, 17, 6;
    20, 22, 4;
    22, 25, 5;
    22, 28, 5
]
P :=
    a ← 0
    for i ∈ 1 .. kol_tr + kol_lin
        if i ≤ kol_tr
            P[i, 1] ← P_нб[i]
            P[i, 2] ← P_нм[i]
        P[i, 1] ← 0 otherwise
    for i ∈ 1 .. rows(b)
        a ← b[i] if b[i] > a
    while a ≠ 0
        for i ∈ 1 .. kol_lin + kol_tr
            if b[i] == a
                for j ∈ 1 .. kol_lin + kol_tr
                    if (b[j] == a - 1) and n[i] == k[j]
                        P[j, 1] ← P[j, 1] + P[i, 1]
                        P[j, 2] ← P[j, 2] + P[i, 2]
        a ← a - 1
    P
Q :=
    a ← 0
    for i ∈ 1 .. kol_tr + kol_lin
        if i ≤ kol_tr
            P[i, 1] ← Q_нб[i]
            P[i, 2] ← Q_нм[i]
        P[i, 1] ← 0 otherwise
    for i ∈ 1 .. rows(b)
        a ← b[i] if b[i] > a
    while a ≠ 0
        for i ∈ 1 .. kol_lin + kol_tr
            if b[i] == a
                for j ∈ 1 .. kol_lin + kol_tr
                    if (b[j] == a - 1) and n[i] == k[j]
                        P[j, 1] ← P[j, 1] + P[i, 1]
                        P[j, 2] ← P[j, 2] + P[i, 2]
        a ← a - 1
    P
Z_тр :=
    for i ∈ 1 .. rows(Трансформаторы)
        for j ∈ 1 .. rows(Трансформатор_спр)
            if Трансформаторы[i, 3] == Трансформатор_спр[j, 1]
                Z[i, 1] ← Трансформатор_спр[j, 8]
                Z[i, 2] ← Трансформатор_спр[j, 9]
                break
    Z
R := stack(Z_тр[:, 1], R)
X := stack(Z_тр[:, 2], X)
ΔU_нб := (diag(P[:, 1])*R + diag(Q[:, 1])*X)/U_ном
ΔU_нм := (diag(P[:, 2])*R + diag(Q[:, 2])*X)/U_ном
ΔU_нб% := ΔU_нб/10000
ΔU_нм% := ΔU_нм/10000
Таблица_5.1 := WRITEEXCEL(stack(["Начало", "Конец", "P.нб", "Q.нб", "P.нм", "Q.нм", "ΔU.нб", "ΔU.нм", "ΔU.нб%", "ΔU.нм%"], augment(n, k, P[:, 1], Q[:, 1], P[:, 2], Q[:, 2], ΔU_нб, ΔU_нм, ΔU_нб%, ΔU_нм%)), "Таблица 5.1.xlsx")
ΔU_Σ :=
    for i ∈ 1 .. kol_tr
        a[i, 1] ← ΔU_нб[i]
        a[i, 2] ← ΔU_нм[i]
        c ← b[i]
        f ← n[i]
        while c ≠ 0
            for j ∈ kol_tr + 1 .. kol_tr + kol_lin
                if (b[j] == c - 1) and (f == k[j])
                    a[i, 1] ← ΔU_нб[j] + a[i, 1]
                    a[i, 2] ← ΔU_нм[j] + a[i, 2]
                    f ← n[j]
                    break
            c ← c - 1
    a*100/10000
Таблица_5.2 := WRITEEXCEL(stack(["Узел", "ΔU.Σ.нб.%", "ΔU.Σ.нм.%"], augment(submatrix(k, 1, kol_tr, 1, 1), ΔU_Σ)), "Таблица 5.2.xlsx")
# 6. Определение допустимых отклонений напряжения на шинах 0,38 кв ТП
δU_б := 5
δU_у := -5
δU''_ТП.нб := δU_б + ΔU''_нн.б explicit, ALL → 5 + 0 = 5
δU''_ТП.нм := δU_у + ΔU''_нн.у explicit, ALL → -5 + 5 = 0
δU'_ТП.нб := δU_б + m*ΔU''_нн.б explicit, ALL → 5 + 0.15*0 = 5
δU'_ТП.нм := δU_у + m*ΔU''_нн.у explicit, ALL → -5 + 0.15*5 = -4.25
# 7. Выбор режима встречного регулирования напряжения на шинах 10 кВ ЦП
δU''_ЦП := 4
δU'_ЦП := 0
δU''_ЦП.нб := δU''_ЦП + δU_нч explicit, ALL → 4 + 1.068 = 5.068
δU''_ЦП.нм := δU''_ЦП - δU_нч explicit, ALL → 4 - 1.068 = 2.932
δU'_ЦП.нб := δU'_ЦП + δU_нч explicit, ALL → 0 + 1.068 = 1.068
δU'_ЦП.нм := δU'_ЦП - δU_нч explicit, ALL → 0 - 1.068 = -1.068
# 8. Выбор ответвлений трансформаторов ТП
Пределы :=
    for i ∈ 1 .. 5
        U_1.ном ← (1 + (-2.5 + (i - 2)*2.5)/100)
        δU_т ← (0.4/0.38/U_1.ном - 1)*100
        δU''_н.нб.1 ← δU''_ЦП.нб + δU_т - δU''_ТП.нм
        δU''_н.нм.1 ← δU''_ЦП.нб + δU_т - δU'_ТП.нб
        δU''_н.нб.2 ← δU''_ЦП.нм + δU_т - δU''_ТП.нм
        δU''_н.нм.2 ← δU''_ЦП.нм + δU_т - δU'_ТП.нб
        s[i, 1] ← δU''_н.нм.1 if δU''_н.нм.1 > δU''_н.нм.2
        s[i, 1] ← δU''_н.нм.2 otherwise
        s[i, 2] ← δU''_н.нб.2 if δU''_н.нб.1 > δU''_н.нб.2
        s[i, 2] ← δU''_н.нб.1 otherwise
        δU'_н.нб.1 ← δU'_ЦП.нб + δU_т - δU'_ТП.нм
        δU'_н.нм.1 ← δU'_ЦП.нб + δU_т - δU'_ТП.нб
        δU'_н.нб.2 ← δU'_ЦП.нм + δU_т - δU'_ТП.нм
        δU'_н.нм.2 ← δU'_ЦП.нм + δU_т - δU'_ТП.нб
        s[i, 3] ← δU'_н.нм.1 if δU'_н.нм.1 > δU'_н.нм.2
        s[i, 3] ← δU'_н.нм.2 otherwise
        s[i, 4] ← δU'_н.нб.2 if δU'_н.нб.1 > δU'_н.нб.2
        s[i, 4] ← δU'_н.нб.1 otherwise
    s
Ответвления_трансформаторов :=
    f ← k
    for i ∈ 1 .. rows(ΔU_Σ)
        for j ∈ 1 .. 5
            for k ∈ 1 .. 2
                a[i, k] ← "-5%" if ΔU_Σ[i, k] > Пределы[1, k*2 - 1] and ΔU_Σ[i, k] < Пределы[1, k*2]
                otherwise
                    a[i, k] ← "-2,5%" if ΔU_Σ[i, k] > Пределы[2, k*2 - 1] and ΔU_Σ[i, k] < Пределы[2, k*2]
                    otherwise
                        a[i, k] ← "0%" if ΔU_Σ[i, k] > Пределы[3, k*2 - 1] and ΔU_Σ[i, k] < Пределы[3, k*2]
                        otherwise
                            a[i, k] ← "+2,5%" if ΔU_Σ[i, k] > Пределы[4, k*2 - 1] and ΔU_Σ[i, k] < Пределы[4, k*2]
                            otherwise
                                a[i, k] ← "+5%" if ΔU_Σ[i, k] > Пределы[5, k*2 - 1] and ΔU_Σ[i, k] < Пределы[5, k*2]
                                a[i, k] ← "Не найдено" otherwise
    stack(["Трансформатор", "ΔU.Σ.нб", "ΔU.Σ.нм", "%.нб", "%.нм"], augment(submatrix(f, 1, kol_tr, 1, 1), ΔU_Σ, a))
Таблица_пределов := stack(["Добавка", "Нб.min", "Нб.max", "Нм.min", "Нм.max"], augment(["-5%"; "-2,5%"; "0%"; "+2,5%"; "+5%"], Пределы))
i := 4
U_1.ном := 1 + (-2.5 + (i - 2)*2.5)/100 = 1.025
δU_т := (0.4/0.38/U_1.ном - 1)*100 = 2.69576
δU''_н.нб.1 := δU''_ЦП.нб + δU_т - δU''_ТП.нм explicit, ALL → 5.068 + 2.696 - 0 = 7.76376
δU''_н.нм.1 := δU''_ЦП.нб + δU_т - δU'_ТП.нб explicit, ALL → 5.068 + 2.696 - 5 = 2.76376
δU''_н.нб.2 := δU''_ЦП.нм + δU_т - δU''_ТП.нм explicit, ALL → 2.932 + 2.696 - 0 = 5.62776
δU''_н.нм.2 := δU''_ЦП.нм + δU_т - δU'_ТП.нб explicit, ALL → 2.932 + 2.696 - 5 = 0.627764
δU'_н.нб.1 := δU'_ЦП.нб + δU_т - δU'_ТП.нм explicit, ALL → 1.068 + 2.696 - (-4.25) = 8.01376
δU'_н.нм.1 := δU'_ЦП.нб + δU_т - δU'_ТП.нб explicit, ALL → 1.068 + 2.696 - 5 = -1.23624
δU'_н.нб.2 := δU'_ЦП.нм + δU_т - δU'_ТП.нм explicit, ALL → -1.068 + 2.696 - (-4.25) = 5.87776
δU'_н.нм.2 := δU'_ЦП.нм + δU_т - δU'_ТП.нб explicit, ALL → -1.068 + 2.696 - 5 = -3.37224
Ответвления_трансформаторов :=
    f ← k
    for i ∈ 1 .. rows(ΔU_Σ)
        for j ∈ 1 .. 5
            if ΔU_Σ[i, 1] > Пределы[1, 1] and ΔU_Σ[i, 1] < Пределы[1, 2]
                a[i, 1] ← "-5%"
                a[i, 2] ← "-5%" if ΔU_Σ[i, 2] > Пределы[1, 3] and ΔU_Σ[i, 2] < Пределы[1, 4]
            otherwise
                if ΔU_Σ[i, 1] > Пределы[2, 1] and ΔU_Σ[i, 1] < Пределы[2, 2]
                    a[i, 1] ← "-2,5%"
                    a[i, 2] ← "-2,5%" if ΔU_Σ[i, 2] > Пределы[2, 3] and ΔU_Σ[i, 2] < Пределы[2, 4]
                otherwise
                    if ΔU_Σ[i, 1] > Пределы[3, 1] and ΔU_Σ[i, 1] < Пределы[3, 2]
                        a[i, 1] ← "0%"
                        a[i, 2] ← "0%" if ΔU_Σ[i, 2] > Пределы[3, 3] and ΔU_Σ[i, 2] < Пределы[3, 4]
                    otherwise
                        if ΔU_Σ[i, 1] > Пределы[4, 1] and ΔU_Σ[i, 1] < Пределы[4, 2]
                            a[i, 1] ← "+2,5%"
                            a[i, 2] ← "+2,5%" if ΔU_Σ[i, 2] > Пределы[4, 3] and ΔU_Σ[i, 2] < Пределы[4, 4]
                        otherwise
                            if ΔU_Σ[i, 1] > Пределы[5, 1] and ΔU_Σ[i, 1] < Пределы[5, 2]
                                a[i, 1] ← "+5%"
                                a[i, 2] ← "+5%" if ΔU_Σ[i, 2] > Пределы[5, 3] and ΔU_Σ[i, 2] < Пределы[5, 4]
                            a[i, 1] ← "Не найдено" otherwise
    stack(["Трансформатор", "ΔU.Σ.нб", "ΔU.Σ.нм", "%.нб", "%.нм"], augment(submatrix(f, 1, kol_tr, 1, 1), ΔU_Σ, a))
Таблица_8.2 := WRITEEXCEL(Таблица_пределов, "Таблица 8.2.xlsx")
Таблица_8.3 := WRITEEXCEL(Ответвления_трансформаторов, "Таблица 8.3.xlsx")
Таблица_пределов = [
    "Добавка", "Нб.min", "Нб.max", "Нм.min", "Нм.max";
    "-5%", 10.8713, 13.7353, 6.87132, 13.9853;
    "-2,5%", 8.03021, 10.8942, 4.03021, 11.1442;
    "0%", 5.33116, 8.19516, 1.33116, 8.44516;
    "+2,5%", 2.76376, 5.62776, -1.23624, 5.87776;
    "+5%", 0.318627, 3.18263, -3.68137, 3.43263
]
Ответвления_трансформаторов = [
    "Трансформатор", "ΔU.Σ.нб", "ΔU.Σ.нм", "%.нб", "%.нм";
    3, 4.80898, 0.721347, "+2,5%", "+2,5%";
    4, 4.80898, 0.721347, "+2,5%", "+2,5%";
    6, 3.62328, 0.543492, "+2,5%", "+2,5%";
    7, 3.62328, 0.543492, "+2,5%", "+2,5%";
    9, 3.75641, 0.563462, "+2,5%", "+2,5%";
    10, 3.75641, 0.563462, "+2,5%", "+2,5%";
    12, 3.81888, 0.572831, "+2,5%", "+2,5%";
    13, 3.81888, 0.572831, "+2,5%", "+2,5%";
    15, 3.86363, 0.579545, "+2,5%", "+2,5%";
    16, 3.86363, 0.579545, "+2,5%", "+2,5%";
    18, 3.9937, 0.599055, "+2,5%", "+2,5%";
    19, 3.9937, 0.599055, "+2,5%", "+2,5%";
    21, 3.79174, 0.568761, "+2,5%", "+2,5%";
    23, 3.809, 0.57135, "+2,5%", "+2,5%";
    24, 3.809, 0.57135, "+2,5%", "+2,5%";
    26, 3.84534, 0.576801, "+2,5%", "+2,5%";
    27, 3.84534, 0.576801, "+2,5%", "+2,5%";
    29, 3.86327, 0.57949, "+2,5%", "+2,5%";
    30, 3.86327, 0.57949, "+2,5%", "+2,5%"
]
